*Heading
** Job name: Patch1 Model name: Patch1
** Generated by: Abaqus/CAE 6.11-1
*Preprint, echo=NO, model=NO, history=NO, contact=NO
**
** PARTS
**
*Part, name=PART-1-MESH-1
*Node
1, -1.0, -1.0, 0.0
2, 1.0, -1.0, 0.0
3, -1.0, 1.0, 0.0
4, 1.0, 1.0, 0.0
5, -1.0, -1.0, 0.25
6, 1.0, -1.0, 0.25
7, -1.0, 1.0, 0.25
8, 1.0, 1.0, 0.25
9, 0.0, 0.0, 0.0
10, 0.0, 0.0, 0.0
11, 0.0, 0.0, 0.0
12, 0.0, 0.0, 0.0
13, 0.0, 0.0, 0.0
14, 0.0, 0.0, 0.0
15, 0.0, 0.0, 0.0
16, 0.0, 0.0, 0.0
17, 0.0, 0.0, 0.0
18, 0.0, 0.0, 0.0
19, 0.0, 0.0, 0.0
20, 0.0, 0.0, 0.0
21, 0.0, 0.0, 0.0
22, 0.0, 0.0, 0.0
23, 0.0, 0.0, 0.0
24, 0.0, 0.0, 0.0
25, -1.0, -1.0, 0.0
26, 1.0, -1.0, 0.0
27, -1.0, 1.0, 0.0
28, 1.0, 1.0, 0.0
29, -1.0, -1.0, 0.25
30, 1.0, -1.0, 0.25
31, -1.0, 1.0, 0.25
32, 1.0, 1.0, 0.25
33, 0.0, 0.0, 0.0
34, 0.0, 0.0, 0.0
35, 0.0, 0.0, 0.0
36, 0.0, 0.0, 0.0
37, 0.0, 0.0, 0.0
38, 0.0, 0.0, 0.0
39, 0.0, 0.0, 0.0
40, 0.0, 0.0, 0.0
41, 0.0, 0.0, 0.0
42, 0.0, 0.0, 0.0
43, 0.0, 0.0, 0.0
44, 0.0, 0.0, 0.0
45, 0.0, 0.0, 0.0
46, 0.0, 0.0, 0.0
47, 0.0, 0.0, 0.0
48, 0.0, 0.0, 0.0
*USER ELEMENT, TYPE=U338, NODES=48, COORDINATES=3, PROPERTIES=1, VARIABLES=1
1,2,3
*Element, type=U338, elset=uel_xlam
1,1,2,4,3,5,6,8,7,9,10,11,12,13,14,15,16,17,18,19,20,21,22,23,24,
25,26,28,27,29,30,32,31,33,34,35,36,37,38,39,40,41,42,43,44,45,46,47,48
*UEL PROPERTY, elset=uel_xlam
1
*End Part
**
**
** ASSEMBLY
**
*Assembly, name=Assembly
**
*Instance, name=PART-1-MESH-1-1, part=PART-1-MESH-1
*End Instance
**
*Nset, nset=BOTTOM, instance=PART-1-MESH-1-1
  1,  2,  5, 6
*Nset, nset=LEFT, instance=PART-1-MESH-1-1
  1,  3, 5, 7
*Nset, nset=RIGHT, instance=PART-1-MESH-1-1
  2,  4, 6, 8
*Nset, nset=TOP, instance=PART-1-MESH-1-1
 3, 4, 7, 8
*Nset, nset=BACK, instance=PART-1-MESH-1-1
 1, 2, 3, 4
*End Assembly
**
** BOUNDARY CONDITIONS
**
** Name: Disp-BC-1 Type: Displacement/Rotation
*Boundary
BOTTOM, 2, 2
BOTTOM, 1, 1
BOTTOM, 3, 3
TOP, 1, 1
TOP, 3, 3
** Name: Disp-BC-2 Type: Displacement/Rotation
**Boundary
**LEFT, 1, 1
** Name: Disp-BC-3 Type: Displacement/Rotation
**Boundary
**BACK, 3, 3
** ----------------------------------------------------------------
**
** STEP: tension
**
*Step, name=tension, inc=1000
*Static
0.0002, 0.06, 1e-07, 0.0002
**
** BOUNDARY CONDITIONS
**
** Name: Vel-BC-1 Type: Velocity/Angular velocity
*Boundary, type=VELOCITY
TOP, 2, 2, 1.
**
** CONTROLS
**
*Controls, reset
*Controls, parameters=time incrementation
1600, 2000, , 3000, 2400, 50, , 125, , ,
**
** OUTPUT REQUESTS
**
*Restart, write, frequency=0
**
** FIELD OUTPUT: F-Output-1
**
*Output, field, variable=PRESELECT
**
** HISTORY OUTPUT: H-Output-1
**
*Output, history, variable=PRESELECT
*End Step
