*Heading
** Job name: OHTNettles0 Model name: 0 Deg-BiasMesh
** Generated by: Abaqus/CAE 6.12-2
*Preprint, echo=NO, model=NO, history=NO, contact=NO
**
** PARTS
**
*Part, name=Part-1
*Node
1, 3.01960444, 0.981128931, 0.0
2, 2.82894564, 1.44141984, 0.0
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*USER ELEMENT, TYPE=U328, NODES=24, COORDINATES=3, PROPERTIES=1, VARIABLES=1
1,2,3
*Element, type=U328, elset=uel_xbrick
1, 2209, 1, 358, 526, 4781, 2573, 2930, 3098, 5145, 5146, 5147, 5148, 5149, 5150, 5151, 5152, 5153, 5154, 5155, 5156, 5157, 5158, 5159, 5160
2, 548, 2210, 2209, 538, 3120, 4782, 4781, 3110, 5161, 5162, 5163, 5164, 5165, 5166, 5167, 5168, 5169, 5170, 5171, 5172, 5173, 5174, 5175, 5176
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*UEL PROPERTY, elset=uel_xbrick
1
*End Part
**
**
** ASSEMBLY
**
*Assembly, name=Assembly
**
*Instance, name=Part-1-1, part=Part-1
*End Instance
**
*Nset, nset=Left, instance=Part-1-1
   51,   52,   53,   54,   55,   56
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*Nset, nset=Right, instance=Part-1-1
   50,   84,   85,   86,   87,   88
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*Nset, nset=midsurf, instance=Part-1-1, generate
 2573,  5144,     1
*End Assembly
**
** BOUNDARY CONDITIONS
**
** Name: fixleft Type: Displacement/Rotation
*Boundary
Left, 1, 1
Left, 2, 2
** Name: fixright Type: Displacement/Rotation
*Boundary
Right, 2, 2
** Name: sym Type: Displacement/Rotation
*Boundary
midsurf, 3, 3
** ----------------------------------------------------------------
**
** STEP: Tension
**
*Step, name=Tension, inc=2800000
*Static
0.01, 2.8, 1e-06, 0.01
**
** BOUNDARY CONDITIONS
**
** Name: pull Type: Velocity/Angular velocity
*Boundary, type=VELOCITY
Right, 1, 1, 1.
**
** CONTROLS
**
*Controls, reset
*Controls, parameters=time incrementation
800, 1000, , 1500, 1200, 50, , 125, , ,
*Controls, parameters=field, field=displacement
0.01, , , , 0.05, , ,
*Controls, parameters=field, field=hydrostatic fluid pressure
0.01, , , , 0.05, , ,
*Controls, parameters=field, field=rotation
0.01, , , , 0.05, , ,
*Controls, parameters=field, field=electrical potential
0.01, , , , 0.05, , ,
**
** OUTPUT REQUESTS
**
*Restart, write, frequency=0
**
** FIELD OUTPUT: F-Output-1
**
*Output, field
*Node Output
RF, U
**
** HISTORY OUTPUT: H-Output-1
**
*Output, history, variable=PRESELECT
*End Step
