*Heading
** Job name: Patch1 Model name: Model-1
** Generated by: Abaqus/CAE 6.12-2
*Preprint, echo=NO, model=NO, history=NO, contact=NO
**
** PARTS
**
*Part, name=Part-1-mesh-1
*Node
1, -1.0, -1.0, 0.0
2, -0.333333343, -1.0, 0.0
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*USER ELEMENT, TYPE=328, NODES=24, COORDINATES=3, PROPERTIES=0, VARIABLES=0
1,2,3
*Element, type=328, elset=uel_xbrick
1, 1, 2, 6, 5, 17, 18, 22, 21, 33, 34, 35, 36, 37, 38, 39, 40, 41, 42, 43, 44, 45, 46, 47, 48
2, 2, 3, 7, 6, 18, 19, 23, 22, 49, 50, 51, 52, 53, 54, 36, 35, 55, 56, 57, 58, 59, 60, 44, 43
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*USER ELEMENT, TYPE=318, NODES=8, COORDINATES=3, PROPERTIES=0, VARIABLES=0
1,2,3
*Element, type=318, elset=uel_coh3d8
10, 1, 2, 6, 5, 17, 18, 22, 21
11, 2, 3, 7, 6, 18, 19, 23, 22
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*End Part
**
**
** ASSEMBLY
**
*Assembly, name=Assembly
**
*Instance, name=Part-1-mesh-1-1, part=Part-1-mesh-1
*End Instance
**
*Nset, nset=left, instance=Part-1-mesh-1-1
  1,  5,  9, 13
*Nset, nset=right, instance=Part-1-mesh-1-1
  4,  8, 12, 16
*Nset, nset=top, instance=Part-1-mesh-1-1
 13, 14, 15, 16
*Nset, nset=bottom, instance=Part-1-mesh-1-1
  1,  2,  3,  4
*Nset, nset=load1, instance=Part-1-mesh-1-1
 12, 16
*Nset, nset=load2, instance=Part-1-mesh-1-1
  4,  8
*End Assembly
**
** BOUNDARY CONDITIONS
**
** Name: fix-bottom Type: Displacement/Rotation
*Boundary
bottom, 2, 2
** Name: fix-left Type: Displacement/Rotation
*Boundary
left, 1, 1
** Name: fix-top Type: Displacement/Rotation
*Boundary
top, 2, 2
** ----------------------------------------------------------------
**
** STEP: tension
**
*Step, name=tension
*Static
0.01, 0.01, 1e-07, 0.01
*CONTROLS, PARAMETERS=TIME INCREMENTATION
1600, 2000, , 3000, 2400, 50, , 125, , ,
**
** BOUNDARY CONDITIONS
**
** Name: pull1 Type: Velocity/Angular velocity
*Boundary, type=VELOCITY
load1, 1, 1, 1.
** Name: pull2 Type: Velocity/Angular velocity
*Boundary, type=VELOCITY
load2, 1, 1, 2.
**
** OUTPUT REQUESTS
**
*Restart, write, frequency=0
**
** FIELD OUTPUT: F-Output-1
**
*Output, field, variable=PRESELECT
**
** HISTORY OUTPUT: H-Output-1
**
*Output, history, variable=PRESELECT
*End Step
