*Heading
** Job name: Patch1 Model name: Patch1
** Generated by: Abaqus/CAE 6.11-1
*Preprint, echo=NO, model=NO, history=NO, contact=NO
**
** PARTS
**
*Part, name=PART-1-MESH-1
*Node
1, -1.0, -1.0, -0.25
2, 1.0, -1.0, -0.25
3, -1.0, 1.0, -0.25
4, 1.0, 1.0, -0.25
5, -1.0, -1.0, 0.0
6, 1.0, -1.0, 0.0
7, -1.0, 1.0, 0.0
8, 1.0, 1.0, 0.0
9, -1.0, -1.0, 0.0
10, 1.0, -1.0, 0.0
11, -1.0, 1.0, 0.0
12, 1.0, 1.0, 0.0
13, -1.0, -1.0, 0.25
14, 1.0, -1.0, 0.25
15, -1.0, 1.0, 0.25
16, 1.0, 1.0, 0.25
17, 0.0, 0.0, 0.0
18, 0.0, 0.0, 0.0
19, 0.0, 0.0, 0.0
20, 0.0, 0.0, 0.0
21, 0.0, 0.0, 0.0
22, 0.0, 0.0, 0.0
23, 0.0, 0.0, 0.0
24, 0.0, 0.0, 0.0
25, 0.0, 0.0, 0.0
26, 0.0, 0.0, 0.0
27, 0.0, 0.0, 0.0
28, 0.0, 0.0, 0.0
29, 0.0, 0.0, 0.0
30, 0.0, 0.0, 0.0
31, 0.0, 0.0, 0.0
32, 0.0, 0.0, 0.0
33, 0.0, 0.0, 0.0
34, 0.0, 0.0, 0.0
35, 0.0, 0.0, 0.0
36, 0.0, 0.0, 0.0
37, 0.0, 0.0, 0.0
38, 0.0, 0.0, 0.0
39, 0.0, 0.0, 0.0
40, 0.0, 0.0, 0.0
41, 0.0, 0.0, 0.0
42, 0.0, 0.0, 0.0
43, 0.0, 0.0, 0.0
44, 0.0, 0.0, 0.0
45, 0.0, 0.0, 0.0
46, 0.0, 0.0, 0.0
47, 0.0, 0.0, 0.0
48, 0.0, 0.0, 0.0
*USER ELEMENT, TYPE=U328, NODES=24, COORDINATES=3, PROPERTIES=1, VARIABLES=1
1,2,3
*Element, type=U328, elset=uel_xbrick
1, 1, 2, 4, 3, 5, 6, 8, 7, 17, 18, 19, 20, 21, 22, 23, 24, 25, 26, 27, 28, 29, 30, 31, 32
3, 9, 10, 12, 11, 13, 14, 16, 15, 33, 34, 35, 36, 37, 38, 39, 40, 41, 42, 43, 44, 45, 46, 47, 48
*UEL PROPERTY, elset=uel_xbrick
1
*USER ELEMENT, TYPE=U318, NODES=8, COORDINATES=3, PROPERTIES=1, VARIABLES=1
1,2,3
*Element, type=U318, elset=uel_coh3d8
2, 5, 6, 8, 7, 9, 10, 12, 11
*UEL PROPERTY, elset=uel_coh3d8
1
*End Part
**
**
** ASSEMBLY
**
*Assembly, name=Assembly
**
*Instance, name=PART-1-MESH-1-1, part=PART-1-MESH-1
*End Instance
**
*Nset, nset=BACK, instance=PART-1-MESH-1-1
 1, 2, 3, 4
*Nset, nset=FRONT, instance=PART-1-MESH-1-1
 5, 6, 7, 8
*End Assembly
**
** BOUNDARY CONDITIONS
**
** Name: Disp-BC-2 Type: Displacement/Rotation
*Boundary
BACK, 3, 3
** ----------------------------------------------------------------
**
** STEP: tension
**
*Step, name=tension
*Static
0.001, 0.02, 1e-07, 0.001
**
** BOUNDARY CONDITIONS
**
** Name: Vel-BC-1 Type: Velocity/Angular velocity
*Boundary, type=VELOCITY
FRONT, 3, 3, 1.
**
** CONTROLS
**
*Controls, reset
*Controls, parameters=time incrementation
3200, 4000, , 6000, 4800, 50, , 125, , ,
**
** OUTPUT REQUESTS
**
*Restart, write, frequency=0
**
** FIELD OUTPUT: F-Output-1
**
*Output, field, variable=PRESELECT
**
** HISTORY OUTPUT: H-Output-1
**
*Output, history, variable=PRESELECT
*End Step
