*Heading
** Job name: Patch1 Model name: Model-1
** Generated by: Abaqus/CAE 6.12-2
*Preprint, echo=NO, model=NO, history=NO, contact=NO
**
** PARTS
**
*Part, name=Part-1-mesh-1
*Node
 1, -1.000000, -1.000000
 2, -0.333333, -1.000000
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*USER ELEMENT, TYPE=U2040, NODES=12, COORDINATES=2, PROPERTIES=15, VARIABLES=153
1,2
*Element, type=U2040, elset=whole
 1, 1, 2, 6, 5, 17, 57, 18, 58, 19, 59, 20, 60
 2, 2, 3, 7, 6, 21, 61, 22, 62, 23, 63, 58, 18
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*UEL PROPERTY, ELSET=whole
 100000.000000, 10000.000000, 10000.000000, 5000.000000, 5000.000000, 5000.000000, 0.300000, 0.300000,
 0.300000, 45.000000, 30.000000, 90.000000, 0.200000, 1.000000, 2.000000,
*End Part

**
**
** ASSEMBLY
**
*Assembly, name=Assembly
**
*Instance, name=Part-1-mesh-1-1, part=Part-1-mesh-1
*End Instance
**
*Nset, nset=left, instance=Part-1-mesh-1-1
  1,  5,  9, 13, 20, 29, 36
 60, 69, 76,
*Nset, nset=right, instance=Part-1-mesh-1-1
  4,  8, 12, 16, 25, 32, 39
 65, 72, 79,
*Nset, nset=top, instance=Part-1-mesh-1-1
 13, 14, 15, 16, 35, 38, 40
 75, 78, 80,
*Nset, nset=bottom, instance=Part-1-mesh-1-1
  1,  2,  3,  4, 17, 21, 24
 57, 61, 64,
*Nset, nset=load1, instance=Part-1-mesh-1-1
 12, 16, 39
 79, 72,
*Nset, nset=load2, instance=Part-1-mesh-1-1
  4,  8, 25
 65, 32,
*End Assembly
**
** BOUNDARY CONDITIONS
**
** Name: fix-bottom Type: Displacement/Rotation
*Boundary
bottom, 2, 2
** Name: fix-left Type: Displacement/Rotation
*Boundary
left, 1, 1
** Name: fix-top Type: Displacement/Rotation
*Boundary
top, 2, 2
** ----------------------------------------------------------------
**
** STEP: tension
**
*Step, name=tension
*Static
0.001, 0.01, 1e-07, 0.001
*CONTROLS, PARAMETERS=TIME INCREMENTATION
1600, 2000, , 3000, 2400, 50, , 125, , ,
**
** BOUNDARY CONDITIONS
**
** Name: pull1 Type: Velocity/Angular velocity
*Boundary, type=VELOCITY
right, 1, 1, 1.
**
** OUTPUT REQUESTS
**
*Restart, write, frequency=0
**
*EL PRINT,elset=Part-1-mesh-1-1.whole, FREQ=1
SDV,
**
** FIELD OUTPUT: F-Output-1
**
*Output, field, variable=PRESELECT
**
** HISTORY OUTPUT: H-Output-1
**
*Output, history, variable=PRESELECT
*End Step
